# created by fftool

units real
boundary p p p

atom_style full
bond_style harmonic
angle_style harmonic
dihedral_style opls

special_bonds lj/coul 0.0 0.0 0.5

pair_style hybrid/overlay lj/cut/coul/long 12.0 12.0 coul/long/cs 12.0 thole 2.600 12.0 coul/tt 4 12.0
pair_modify tail yes
kspace_style pppm 1.0e-5

read_data data-p_104ns.prod.lmp
include pair-sc.lmp
include pair-drude.lmp
include pair-tt.lmp
# atom groups convenient for thermostats (see package documentation), etc.
group ATOMS type 1 2 3 4 5 6 7 8 9 10 11 12 13 14 15 16 17 18 19 20 21
group CORES type 1 2 4 5 7 9 10 11 12 13 14 15
group DRUDES type 22 23 24 25 26 27 28 29 30 31 32 33

# flag for each atom type: [C]ore, [D]rude, [N]on-polarizable
fix DRUDE all drude C C N C C N C N C C C C C C C N N N N N N D D D D D D D D D D D D

# minimize 1.0e-4 1.0e-6 100 1000
# reset_timestep 0

fix SHAKE all shake 0.0001 20 0 b 2 5 7 8 9 12 15 16

neighbor 2.0 bin

timestep 1.0

variable TK equal 333.15
variable PBAR equal 1.0

comm_modify vel yes

#velocity ATOMS create ${TK} 12345

# compute the temperatures of ATOMS, DC-DP pair centers of mass and DPs
compute TATOM ATOMS temp
compute TDRUDE all temp/drude

# NPT (Nose-Hoover)
fix DTDIR all drude/transform/direct
fix TSTAT ATOMS npt temp ${TK} ${TK} 200 iso ${PBAR} ${PBAR} 1000
fix_modify TSTAT temp TATOM press thermo_press
fix TSTDR DRUDES nvt temp 1.0 1.0 50
fix DTINV all drude/transform/inverse


fix ICECUBE all momentum 1000 linear 1 1 1

thermo_style custom step time cpu etotal ke pe ebond eangle evdwl ecoul elong &
  press vol density c_TDRUDE[1] c_TDRUDE[2] c_TDRUDE[3] c_TDRUDE[4]
thermo 1000

#dump TRAJ_EQ all custom 2000 NPT_eq_denak.lmp element xu yu zu q
#dump_modify TRAJ_EQ element N C H C C H O H Cl C C C O O O H H H H H H D D D D D D D D D D D D sort id
dump TRAJ_EQ2 ATOMS custom 1000 NPT_50_80ns_atoms.lmp element xu yu zu q
dump_modify TRAJ_EQ2 element N C H C C H O H Cl C C C O O O H H H H H H D D D D D D D D D D D D sort id

restart 50000 restart1.lmp restart2.lmp

run 6000000

write_data data-p_110ns.lmp

#undump TRAJ_EQ
#undump TRAJ_EQ2


#dump TRAJ_PROD all custom 5000 NPT_prod_denak.lmp element xu yu zu q
#dump_modify TRAJ_PROD element N C H C C H O H Cl C C C O O O H H H H H H D D D D D D D D D D D D sort id
#dump TRAJ_PROD2 ATOMS custom 5000 NPT_prod_atoms.lmp element xu yu zu q
#dump_modify TRAJ_PROD2 element N C H C C H O H Cl C C C O O O H H H H H H D D D D D D D D D D D D sort id

run 6000000
write_data data-p_116ns.prod.lmp

run 6000000
write_data data-p_122ns.prod.lmp

run 6000000
write_data data-p_128ns.prod.lmp

run 6000000
write_data data-p_134ns.prod.lmp
